Модулятор
Si(π*125*10^3*16*10^-6) → Si(2*π)
k := 2
T := 16*10^-6
f0 := 6.25*10^6
G(f) := T*sin(π*f*T)^2/(π*f*T)^2
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f3 := f0
G(f0) = 4.88233e-37
# Вот это не надо ->
integral(cos(2*π*(f3 - k/T)*t)*sin(2*π*(f3 + k/T)*t), t = 0 .. T) = -2.50586e-20
cos(4*π*f3*T) = 1
F := 125*10^3
k := 2
(cos(2*π*T*F) - 1)/(2*π^2*T*F) + atan(F)/π = 0.499997
df := k/T
f1 := f0 - df
f2 := f0 + df
# Эта тема только для ЧМ, для других
# модуляций отличается ->
Gs(f) := ((1/2)*T*sin(π*T*(f - f1))^2/(π*T*(f - f1))^2) + (1/2)*T*sin(π*T*(f - f2))^2/(π*T*(f - f2))^2
Демодулятор
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U := 1
E := U^2*T
N := 8.53*10^-7
x := (E/N)^(1/2)
x = 4.33097
P := 85*10^-7
v := 62500
c := v*(1 + P*log(P, 2) + (1 - P)*log(1 - P, 2))
c = 62490.3
ЦАП
Fv := 3.4*10^3
x := 1/(2*Fv)
g(t) := 2*Fv*sin(2*π*Fv*(t - x))/(2*π*Fv*(t - x))
g(0.15*10^-3)*x = 0.999342
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