АМ
df := 1/(10.4*10^-6)
fc := 96*10^5  # ФМ
ЧМ
Xam := sqrt(integral(cos(2*π*96*10^5*t)^2, t = 0 .. 10.4*10^-6)/(2*2.72*10^-7)) = 3.09062
Xfm := sqrt(integral((cos(2*π*(fc + df)*t) - cos(2*π*(fc - df)*t))^2, t = 0 .. 10.4*10^-6)/(2*2.72*10^-7)) = 4.37237
Xpm := sqrt(integral((cos(2*π*fc*t) - (-cos(2*π*fc*t)))^2, t = 0 .. 10.4*10^-6)/(2*2.72*10^-7)) = 6.18124
1/sqrt(2*π)*integral(exp(-y^2/2), y = 3.1 .. ∞) = 0.000967604
1/sqrt(2*π)*integral(exp(-y^2/2), y = Xfm .. ∞) = 6.14517e-6
1/sqrt(2*π)*integral(exp(-y^2/2), y = Xpm .. ∞) = 3.18002e-10
Qam(Xam) := 1/sqrt(2*π)*integral(exp(-y^2/2), y = Xam .. ∞)
Qfm(Xfm) := 1/sqrt(2*π)*integral(exp(-y^2/2), y = Xfm .. ∞)
Qpm(Xpm) := 1/sqrt(2*π)*integral(exp(-y^2/2), y = Xpm .. ∞)
T := 10.4*10^-6
h1 := T/2/(2.72*10^-7) = 19.1176
sqrt(h1) = 4.37237
h2 := h1*0.125 = 2.38971
F(h) := 1/sqrt(2*π)*integral(exp(-y^2/2), y = -∞ .. h)
h3 := 0.25*h1 = 4.77941
h0 := 0*h1
h4 := 0.5*h1 = 9.55882
P1fm := 1 - F(sqrt(h2)) = 0.0610683
P3am := 1 - F(sqrt(h4/2)) = 0.014401
P1pm := 1 - F(sqrt(2*h2)) = 0.014401
P1am := 1 - F(sqrt(h2/2)) = 0.137176
P3fm := 1 - F(sqrt(h4)) = 0.000994953
P3pm := 1 - F(sqrt(2*h4)) = 6.14614e-6
P1dpm := 2*P1pm = 0.028802
P3dpm := 2*P3pm = 1.22923e-5
P2fm := 1 - F(sqrt(h3)) = 0.014401
P2pm := 1 - F(sqrt(2*h3)) = 0.000994953
P2am := 1 - F(sqrt(h3/2)) = 0.0610683
P4am := 1 - F(sqrt(h1/2)) = 0.000994953
P2dpm := 2*P2pm = 0.00198991
P4fm := 1 - F(sqrt(h1)) = 6.14614e-6
P4pm := 1 - F(sqrt(2*h1)) = 2.6025e-10
P4dpm := 2*P4pm = 5.20499e-10
h := [h2; h3; h4; h1]
a := [P1am; P2am; P3am; P4am]
hm1 := [h2; h3; h4; h1]
a1 := [P1fm; P2fm; P3fm; P4fm]
hm2 := [h2; h3; h4; h1]
a2 := [P1pm; P2pm; P3pm; P4pm]
hm3 := [h2; h3; h4; h1]
a3 := [P1dpm; P2dpm; P3dpm; P4dpm]
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0
P := 97*10^-5
C := 1 + P*log(P, 2) + (1 - P)*log(1 - P, 2) = 0.988892
