fv := 1.06*10^4
w(a) :=
    0 if a < -25.6
    0 if a > 25.6
    1/51.2 if a ≥ -25.6 and a ≤ 25.6
f(a) :=
    0 if a < -25.6
    1 if a > 25.6
    (a + 25.6)/51.2 if a ≥ -25.6 and a ≤ 25.6
v := 2*π*fv
v = 66601.8
disp := 655.36/3
N := disp/(4*π*fv)
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w(5) = 0.0195312
N = 0.00164
B(τ) := N*v/π*sin(v*τ)/(v*τ)
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G(ω) :=
    0 if ω < -v
    0 if ω > v
    N if ω ≥ -v and ω ≤ v
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