T := 6144
t := 0 .. T - 1
f := transpose([3, 7, 11, 15, 19, 23])
A := transpose([0.050, 0.10, 0.150, 0.20, 0.250, 0.30])
s[t] := sum(A[i]*cos(2*π*f[i]*t/T), i = 0 .. length(A) - 1)
S := 2*cfft(s)/sqrt(T)  # Форма и спектр передаваемого сигнала
dt := 64
τ := dt/4
e[t] :=
    1 if mod(t, dt) < τ
    0 otherwise
E := 2*cfft(e)/sqrt(T)  # Форма и спектр сигнала-переносчика
sd1[t] := (0 + s[t])*e[t]
sd2[t] := sd1[floor(t/τ)*τ]
SD := 2*cfft(sd1)/sqrt(T)
# SD спектр дискретного сигнала, следует изменять 1 на 2 и обратно в зависимости  от того, спектр АИМ-1 или АИМ-2 надо получить
F[t] :=
    1 if t < 24
    0 otherwise
SF[t] := F[t]*SD[t]
sf := Re(icfft(SF))*sqrt(T)
# Спектр и форма принятого сигнала
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