f1 := 9.6*10^6
Gs3(f) := T*sin(π*f*T)^2/(π*f*T)^2
T ≡ 10.4*10^-6
Gs1(f) := T*sin(π*(f - f1)*T)^2/(π*(f - f1)*T)^2
Gs2(f) := T*sin(π*(f + f1)*T)^2/(π*(f + f1)*T)^2
Gs(f) := Gs1(f) + Gs2(f) + Gs3(f)
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