# ЦАП часть 2
f := 8*10^3
l := -1.6
c := 20
s := 2
A1 := l + 0.1*(c - 2*s)
A1 = 0
T := 1/(2*f) = 6.25e-5
A2 := l + 0.1*(c - s)
a1(t) := A1*sin(2*π*f*(t + 2*T))/(2*π*f*(t + 2*T))
A2 = 0.2
a2(t) := A2*sin(2*π*f*(t + T))/(2*π*f*(t + T))
A3 := l + 0.1*c
A3 = 0.4
A4 := l + 0.1*(c + s)
A4 = 0.6
a3(t) := A3*sin(2*π*f*t)/(2*π*f*t)
a4(t) := A4*sin(2*π*f*(t - T))/(2*π*f*(t - T))
A5 := l + 0.1*(c + 2*s)
A5 = 0.8
a5(t) := A5*sin(2*π*f*(t - 2*T))/(2*π*f*(t - 2*T))
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3
