Tab := 4.5*π
Tb := 1
h := 1
B1(t) :=
    cos(t)*(t + 6*π) if t ≤ 0 and t ≥ -Tab
    -cos(t)*(t - 6*π) if t ≥ 0 and t ≤ Tab
    0 otherwise
B(t) :=
    h^2*(1 - |t|/Tb) if |t| ≤ Tb
    0 if (|t| > Tb)
G(w) := Tb*h^2*sin(w*Tb/2)*sin(w*Tb/2)/(w*Tb/2)^2
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