Амплитудно - импульсная*модуляция
# Период дескритизации | Скважность импульса
# [component: outputs Td]
# [component: outputs Q]
T := 8192
t := 0 .. T - 1
f := t
dt := 2^(4 + Td)
q := 2^Q
τ := dt/q
W(arg) := 2*cfft(arg)/sqrt(T)
IW(arg) := Re(sqrt(T)*icfft(arg)/2)
A := transpose([0, 0.05, 0.1, 0.15, 0.2, 0.25])
k := transpose([0, 2, 4, 6, 8, 10])
s[t] := sum(A[i]*cos(2*π*k[i]*t/T), i = 0 .. 5)
S := W(s)
e[t] :=
    1 if mod(t, dt) < τ
    0 otherwise
E := W(e)
imp[t] :=
    1 if t < τ
    0 otherwise
IMP := W(imp)
pam1[t] := e[t]*s[t]
PAM1 := W(pam1)
pam2[t] := e[t]*s[floor(t/dt)*dt]
PAM2 := W(pam2)
LF[f] :=
    1 if f < 11
    0 otherwise
lf := IW(LF)
SF1[f] := LF[f]*PAM1[f]
SF2[f] := LF[f]*PAM2[f]
sf1 := IW(SF1)
sf2 := IW(SF2)
K1 := max(s)/max(sf1)
K2 := max(s)/max(sf2)
d1 := K1*sf1
d2 := K2*sf2
err12 := d1 - d2
err1 := s - d1
err2 := s - d2
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