T := 1024
t := 0 .. T - 1
z := T/2 .. T - 1  # Параметры времени наблюдения за сигналом
# [component: outputs канал]
# параметры первичного сигнала
A := 2
f := 2
a1[t] := A*cos(2*π*f*t/T)
a2 := -a1
a3[t] :=
    A if mod(t, 512) < 128
    A*0.1 otherwise
A0 := 3
# [component: outputs ПС]
# Постоянная составляющая в дискретизируемом сигнале
# [component: outputs yn1]
# [component: outputs yn2]
# [component: outputs yn3]
# [component: outputs sync]
# Подключение источников первичных сигналов и синхросигналов
SpA :=
    fft(a1)/sqrt(256) if канал == 1
    fft(a2)/sqrt(256) if канал == 2
    fft(a3)/sqrt(256) if канал == 3
# несущие сигналы
e1[t] :=
    1 if mod(t, 32) > 9 and mod(t, 32) < 13
    0 otherwise
SpE1 := fft(e1)/sqrt(256)
e2[t] :=
    1 if mod(t, 32) > 16 and mod(t, 32) < 21
    0 otherwise
SpE2 := fft(e2)/sqrt(256)
e3[t] :=
    1 if mod(t, 32) > 24 and mod(t, 32) < 28
    0 otherwise
SpE3 := fft(e3)/sqrt(256)  # Функции времени и частоты несущих сигналов
ss[t] :=
    1 if mod(t, 32) < 8
    0 otherwise
s1[t] := (a1[t] + A0*ПС)*e1[t]
SpS1 := fft(s1)/sqrt(256)
s2[t] := (a2[t] + A0*ПС)*e2[t]
SpS2 := fft(s2)/sqrt(256)
s3[t] := a3[t]*e3[t]
SpS3 := fft(s3)/sqrt(256)  # Функции времени и частоты канальных сигналов (амплитудная модуляция)
G := yn1*s1 + yn2*s2 + yn3*s3 + sync*ss
SpG := fft(G)/sqrt(256)  # Формирование группового сигнала
Channel := 43
l := 0 .. Channel - 1
h[l] := (0.5 + 0.01*rnd(13))/(l + 3)  # Формирование отклика канала
# [component: outputs ЛинейныеИскажения]
# [component: outputs НелинейныеИскажения]
НелинейныеИскажения = 1
Gout :=
    G if ЛинейныеИскажения == 0
    Re(submatrix(convol(G, h), 0, T - 1, 0, 0)) if ЛинейныеИскажения == 1
Gout[t] :=
    Gout[t] if НелинейныеИскажения == 0
    0.3*Gout[t] + 0.1*Gout[t]^2 + 1.05*Gout[t]^3 if НелинейныеИскажения == 1
SpGout := fft(Gout)/sqrt(256)
F[t] :=
    1 if t > 1 and t < 13
    0 otherwise  # Фильтр нижних частот
d1[t] := Gout[t]*e1[t]
SpD1 := fft(d1)/sqrt(256)
d2[t] := Gout[t]*e2[t]
SpD2 := fft(d2)/sqrt(256)
d3[t] := Gout[t]*e3[t]
SpD3 := fft(d3)/sqrt(256)  # Функции времени и частоты демодулированного группового сигнала на разных несущих
SpD1[z] := 0
SpD2[z] := 0
SpD3[z] := 0
SpF1[t] := F[t]*SpD1[t]
SpF2[t] := F[t]*SpD2[t]
SpF3[t] := F[t]*SpD3[t]
y1 := sqrt(T)*Re(icfft(SpF1))
y2 := sqrt(T)*Re(icfft(SpF2))
y3 := sqrt(T)*Re(icfft(SpF3))
# [component: outputs канал]
# Выбор номера канала для вывода графиков
SpD :=
    SpD1 if канал == 1
    SpD2 if канал == 2
    SpD3 if канал == 3
d :=
    d1 if канал == 1
    d2 if канал == 2
    d3 if канал == 3
SpF :=
    SpF1 if канал == 1
    SpF2 if канал == 2
    SpF3 if канал == 3
y :=
    y1 if канал == 1
    y2 if канал == 2
    y3 if канал == 3
x :=
    a1 if канал == 1
    a2 if канал == 2
    a3 if канал == 3
# Калибровка амплитуд для временной (AmpT) и частотной областей (AmpF), калибровка оси частот (FD)
# [component: outputs AmpF]
# [component: outputs FD]
# [component: outputs AmpT]
AmpT := AmpT/2 = 0.5
AmpF := AmpF/10 = 1.1
FD := FD*T/16
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# Cигнал-переносчик (слева- функция времени, справа-частоты)
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# Групповой сигнал на входе канала (слева- функция времени, справа-частоты)
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# Групповой сигнал на выходе канала (слева- функция времени, справа-частоты)
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# Демодулированный сигнал (слева- функция времени, справа-частоты)
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# Принимаемый сигнал (слева- функция времени, справа-частоты)
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# Первичный сигнал (слева- функция времени, справа-частоты)
