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# [component: outputs a1]
# [component: outputs lfpd1]
# [component: outputs s1]
# [component: outputs d1]
# [component: outputs f1]
# [component: outputs e1]
# [component: outputs s2]
# [component: outputs a2]
# [component: outputs lfpd2]
# [component: outputs d2]
# [component: outputs f2]
# [component: outputs g1]
# [component: outputs gl]
# [component: outputs e2]
# [component: outputs a3]
# [component: outputs lfpd3]
# [component: outputs s3]
# [component: outputs d3]
# [component: outputs f3]
# линейные искажения
# [component: outputs line]
# [component: outputs e3]
# нелинейные искажения
# [component: outputs nline]
шум
# [component: outputs noise]
# [component: outputs sspd]
# [component: outputs modulator]
# [component: outputs Specter]
N := 3
n := 0 .. N - 1
T := 4096
t := 0 .. T - 1
f := t
f0 := T^-1
k[0] := a1
k[1] := a2
k[2] := a3
gr := mod(Specter + 1, 2)*50  # gr функция для графиков
f1 = 1
FT(arg) := 2*sqrt(f0)*cfft(arg)
IFT(arg) := Re(0.5*sqrt(T)*icfft(arg))
w := 0.012*whiten(T)
# Параметры исходных сигналов
# Параметры сигналов переносчиков
dt := 128
Q := 16
dr := 0 .. 3
q1 := transpose([e1, e2, e3, sspd])
M := 16
m := 0 .. M - 1
fc[m] := 2*(m + 1)
Specter = 1
A[m, 0] :=
    (m + 1)*0.005 if m < 9
    0.05/m otherwise
A[m, 1] :=
    0.045 - A[m, 0] if m < 9
    0.05/m otherwise
e[t, n] :=
    1 if mod(t - (n + 1)*dt/(N + 1), dt) < dt/Q and t > dt
    0 otherwise
e[t, n] :=
    e[t + dt, n] if t < dt
    e[t, n] otherwise
A[m, 2] :=
    0.01*(-1)^m if m < 9
    0.05/m otherwise
c
ss[t] :=
    0.1 if mod(t, dt) < dt/(2*(N + 1))
    0 otherwise
c[:, 0] := e1*e[:, 0]
c[:, 1] := e2*e[:, 1]
c[:, 2] := e3*e[:, 2]
c[:, 3] := sspd*ss
SpecE[:, 3] := FT(ss)
a[t, n] := sum(A[m, n]*cos(2*π*fc[m]*f0*t), m = 0 .. M - 1)
a[:, 0] := a1*a[:, 0]
a[:, 1] := a2*a[:, 1]
a[:, 2] := a3*a[:, 2]
SpecE[:, n] := FT(e[:, n])
SpE[f, dr] :=
    |SpecE[f, dr]| if Specter == 1
    20*log((|SpecE[f, dr]| + 10^-4)/0.775) if Specter == 2 and q1[dr] ≠ 0
    0 if Specter == 2 and q1[dr] == 0
SpecA[:, n] := FT(a[:, n])
SpA[f, n] :=
    |SpecA[f, n]| if Specter == 1
    20*log(|SpecA[f, n]|/0.775) if Specter == 2 and k[n] ≠ 0
    0 if Specter == 2 and k[n] == 0
A
SpE =  # no stored result
z[t, n] :=
    1 if sign(e[t, n]) == 1
    0 otherwise
d1 = 1
# Характеристики фильтров
q2 := transpose([lfpd1, lfpd2, lfpd3])
LF[f] :=
    1 if f > 1 and f < 18
    0 otherwise
SpecF[f, n] := SpecA[f, n]*LF[f]
af[:, n] := IFT(SpecF[:, n])
SpAf[f, n] :=
    |SpecF[f, n]| if Specter == 1
    20*log((|SpecF[f, n]| + 10^-4)/0.775) if Specter == 2 and q2[n] ≠ 0
    0 if Specter == 2 and q2[n] == 0
modulator = 2
# Получение канальных сигналов
q3 := transpose([s1, s2, s3])
# Формирование группового сигнала
z[t, n] := af[t, n]*e[t, n]
s[t, n] :=
    q3[n]*z[t, n] if modulator == 1
    q3[n]*z[floor(t*Q/dt)*dt/Q, n] if modulator == 2
SpecS[:, n] := FT(s[:, n])
SpS[f, n] :=
    |SpecS[f, n]| if Specter == 1
    20*log((|SpecS[f, n]| + 10^-4)/0.775) if Specter == 2 and q3[n] ≠ 0
    0 if Specter == 2 and q3[n] == 0
g :=
    sum(s[:, n], n = 0 .. 2) + c[:, 3] if a1 ≠ 0 or a2 ≠ 0 or a3 ≠ 0
    0*e[:, 2] otherwise
SpecG := FT(g)
SpG[f] :=
    |SpecG[f]| if Specter == 1
    20*log((|SpecG[f]| + 10^-6)/0.775) if Specter == 2
fc = [2; 4; 6; 8; 10; 12; 14; 16; 18; 20; 22; 24; 26; 28; 30; 32]
nline = 1
# Импульсная характеристика канала
ih[t] := 0.1/(1 + exp(0.099*t))
L := 60
l := 0 .. L - 1
h[l] := ih[l]
SpecH := FT(ih)
SpH[f] :=
    |SpecH[f]| if Specter == 1
    20*log(|SpecH[f]|/0.775) if Specter == 2
sout := Re(convol(h, g))
y[t] :=
    0.4*sout[t] if line == 1 and nline == 0
    g[t] if line == 0 and nline == 0
    0.5*sout[t] + (2.31*sout[t]^2) + 9.55*sout[t]^3 if line == 1 and nline == 1
    0.5*g[t] + 2.31*g[t]^2 + 9.55*g[t]^3 if line == 0 and nline == 1
y :=
    y if noise == 0
    y + w if noise == 1
SpecY := FT(y)
SpY[f] :=
    |SpecY[f]| if Specter == 1
    20*log(|SpecY[f]|/0.775) if Specter == 2
nline = 1
# Разделение сигналов
q4 := transpose([d1*a1, d2*a2, d3*a3])
q4 = [1; 1; 1]
d[t, n] := q4[n]*y[t]*e[t, n]
SpecD[:, n] := FT(d[:, n])
SpD[f, n] :=
    |SpecD[f, n]| if Specter == 1
    20*log((|SpecD[f, n]| + 10^-4)/0.775) if Specter == 2 and q4[n] ≠ 0
    0 if Specter == 2 and q4[n] == 0
# Фильтрация сигналов
q5 := transpose([f1*a1, f2*a2, f3*a3])
LF[f] :=
    30 if f > 1 and f < 18
    0 otherwise
SpecА[f, n] := SpecD[f, n]*LF[f]
а[:, n] := IFT(SpecА[:, n])
SpА[f, n] :=
    |SpecА[f, n]| if Specter == 1
    20*log((|SpecА[f, n]| + 10^-4)/0.775) if Specter == 2 and q5[n] ≠ 0
    0 if Specter == 2 and q5[n] == 0
# [component: outputs T_scale]
# [component: outputs F_scale]
# [component: outputs A_scale]
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k[0] = 1
max(SpE) = 0.125
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# Графики нормированных сигналов
